FINISH
/clear
STEPS=100
DDY	=0.005
/PREP7
ET,1,SOLID185

!*************************** MECHANICAL PROPERTIES

TB,USER,1,,19    ! 19 констант материала
TBDATA, 1, 2.0E5   ! prop(1) - Young's modulus (E) [MPa]
TBDATA, 2, 0.3     ! prop(2) - Poisson's ratio (ν)
TBDATA, 3, 800     ! prop(3) - Initial yield stress (σ_y0) [MPa]
TBDATA, 4, 1.2E-20 ! prop(4) - A (creep coefficient)
TBDATA, 5, 3.5     ! prop(5) - n (creep exponent)
TBDATA, 6, -0.2    ! prop(6) - q (creep strain sensitivity)
TBDATA, 7, 5E-12   ! prop(7) - A_cr (creep damage coefficient)
TBDATA, 8, 4.0     ! prop(8) - r (creep damage exponent)
TBDATA, 9, 15000   ! prop(9) - C1_X (Chaboche kinematic hardening)
TBDATA,10, 200     ! prop(10)- γ1_X (Chaboche dynamic recovery)
TBDATA,11, 8000    ! prop(11)- C2_X (Chaboche kinematic hardening)
TBDATA,12, 50      ! prop(12)- γ2_X (Chaboche dynamic recovery)
TBDATA,13, 1000    ! prop(13)- C3_X (Chaboche kinematic hardening)
TBDATA,14, 10      ! prop(14)- γ3_X (Chaboche dynamic recovery)
TBDATA,15, 250     ! prop(15)- K (isotropic hardening coefficient)
TBDATA,16, 0.7     ! prop(16)- m (isotropic hardening exponent)
TBDATA,17, 2.0     ! prop(17)- S (plastic damage resistance)
TBDATA,18, 1.5     ! prop(18)- s (plastic damage exponent)
TBDATA,19, 2.5     ! prop(19)- k (plastic damage coupling)

TB,STAT,1,1,34,
!*************************** GEOMETRY
BLC4,0,0,1,1,1

!*************************** MESHING
LESIZE,ALL, , ,1, , , , ,0
VMESH,1

!*************************** LOADS
DA,5,UX,
DA,3,UY,
DA,1,UZ,

DA,4,UY,DDY

!*************************** SOLUTION
FINISH
/SOL
ANTYPE,0
TIME,1
AUTOTS,0
NSUBST,STEPS,STEPS,STEPS
OUTRES,ALL,ALL
SOLVE


!*************************** RESULTS
!FINISH
!/POST1
!*DIM, DSPL, TABLE, STEPS,2,,,,,
!*do, I, 1,STEPS,1
!	SET,,, ,,, ,I
!	*GET,Par1, NODE, 1, S, EQV
!	DSPL(I,1,1)=Par1
!	*GET,Par2, NODE, 1, EPTO, EQV
!	DSPL(I,2,1)=Par2
!*ENDDO
!DSPL(1,1,1)=0
!DSPL(1,2,1)=0
!PLESOL, S,EQV, 0,1.0
!*VPLOT,DSPL(1,2,1),DSPL(1,1,1), , , , , , , ,
!/REPLOT
